// COMSOL Multiphysics 6.4.0.293 model "microstrip_comsol_compact.mph"
// Outline of the model tree

Probes
  emw_lport1_probe: GlobalVariable "Port Probe" | expr = emw.S11dB; unit = dB; descr = S11

Geometry
  geom1 "Geometry 1" (3D, length unit mm)
    air: Block "Air box" | size = {60, 40, 26.635}; pos = {-5, -20, -10}
    sub: Block "FR4 substrate" | size = {50, 20, 1.6}; pos = {0, -10, 0}
    wp_ground: WorkPlane "Ground plane"
      r1: Rectangle | size = {50, 20}; pos = {0, -10}
    wp_trace: WorkPlane "Microstrip trace" | quickz = 1.6
      r1: Rectangle | size = {50, 3.07}; pos = {0, -1.535}
    wp_port1: WorkPlane "Port 1 sheet" | quickplane = yz
      r1: Rectangle | size = {3.07, 1.6}; pos = {-1.535, 0}
    wp_port2: WorkPlane "Port 2 sheet" | quickplane = yz; quickx = 50
      r1: Rectangle | size = {3.07, 1.6}; pos = {-1.535, 0}
    fin: Finalize "Form Union"

Materials
  mat_air: Common "Air" on domains 1
    def: def "Basic"
      relpermittivity = 1
      relpermeability = 1
      electricconductivity = 0[S/m]
  mat_fr4: Common "FR-4, nominal epsilon_r 4.4, tan(delta) 0.02" on domains 2
    def: def "Basic"
      relpermittivity = 4.4
      relpermeability = 1
      electricconductivity = 2*pi*freq*epsilon0_const*4.4*0.02

Physics
  emw: ElectromagneticWaves "Electromagnetic Waves, Frequency Domain" on all domains
    dependent variable E = {Ex, Ey, Ez}
    wee1: WaveEquationElectric (default)
    pec1: PerfectElectricConductor (default)
    init1: init "Initial Values 1" (default)
    lport1: LumpedPort "50-ohm lumped port 1" on boundaries 10
      SourceType = Power
      P0 = 1[W]
      PortName = 1
      PortType = Uniform
      PortExcitation = on
      Zref = 50[ohm]
      hPort = 1.6[mm]
      wPort = 3.07[mm]
      ahPort = {0, 0, -1}
    lport2: LumpedPort "50-ohm lumped port 2" on boundaries 16
      PortName = 2
      PortType = Uniform
      PortExcitation = off
      Zref = 50[ohm]
      hPort = 1.6[mm]
      wPort = 3.07[mm]
      ahPort = {0, 0, -1}
    pec_microstrip: PerfectElectricConductor "PEC trace and ground" on boundaries 8, 11
    sctr1: Scattering "Open air-box boundaries" on boundaries 1-5, 18 | Order = SecondOrder

Mesh
  mesh1 "Mesh 1"
    size: MeshSizeDefault | hmax = 6; hmin = 1.08; hcurve = 0.6; hnarrow = 0.5; hgrad = 1.5
    size1: Size on all domains | hmax = 2.2[mm]; hmin = 0.18[mm]; hcurve = 0.35; hnarrow = 0.8; hgrad = 1.35; custom = on
    ftet1: FreeTet "Free Tetrahedral 1" on all domains

Studies
  std1 "Study 1"
    freq: Frequency "Frequency Domain" | punit = GHz; plist = range(1[GHz],0.05[GHz],10[GHz])

Solver configurations
  sol1 "Solution 1" (study std1)
    v1: Variables "Dependent Variables 1"
    s1: Stationary "Stationary Solver 1"
      p1: Parametric
      fc1: FullyCoupled
      i1: Iterative "Suggested Iterative Solver (emw)"
        mg1: Multigrid

Datasets
  dset1: Solution | solution = sol1